// SBML level 3 version 1

model Michaelis_Menten()

  // Compartments:
  compartment default_compartment = 1;

  // Species:
  species R5P in default_compartment = 5e-7;
  species RibA in default_compartment = 2e-7;
  species R5P_RibA in default_compartment = 0;
  species D2B4P in default_compartment = 5e-7;
  species RibH in default_compartment = 2e-7;
  species D2B4P_RibH in default_compartment = 0;
  species D8RL in default_compartment = 5e-7;
  species RibE in default_compartment = 2e-7;
  species D8RL_RibE in default_compartment = 0;
  species Riboflavin in default_compartment = 0;
  species RibC in default_compartment = 2e-7;
  species Riboflavin_RibC in default_compartment = 0;
  species FMN in default_compartment = 0;
  species FMN_RibC in default_compartment = 0;
  species FAD in default_compartment = 0;
  species GTP in default_compartment = 5e-7;
  species GTP_RibA in default_compartment = 0;
  species D6P4 in default_compartment = 0;
  species RibD in default_compartment = 2e-7;
  species RibD_D6P4 in default_compartment = 0;
  species A6U in default_compartment = 0;

  // Parameters:
  k_R5P = 0;
  k_GTP = 0;
  k_Riboflavin = 0;
  k_FAD = 0;
  k1 = 1000000;
  k1r = 0.0001;
  k2 = 0.1;

  // Reactions:
  Synthesis1: -> R5P; k_R5P;
  Synthesis2: -> GTP; k_GTP;
  Biomass1: Riboflavin -> ; k_Riboflavin*Riboflavin;
  Biomass2: FAD -> ; k_FAD*FAD;
  BindingR1: R5P + RibA -> R5P_RibA; k1*RibA*R5P;
  DissociationR1: R5P_RibA -> R5P + RibA; k1r*R5P_RibA;
  ConversionR1: R5P_RibA -> RibA + D2B4P; k2*R5P_RibA;
  BindingR2: D2B4P + RibH -> D2B4P_RibH; k1*RibH*D2B4P;
  DissociationR2: D2B4P_RibH -> RibH + D2B4P; k1r*D2B4P_RibH;
  ConversionR2: D2B4P_RibH -> RibH + D8RL; k2*D2B4P_RibH;
  BindingR3: D8RL + RibE -> D8RL_RibE; k1*RibE*D8RL;
  DissociationR3: D8RL_RibE -> RibE + D8RL; k1r*D8RL_RibE;
  ConversionR3: D8RL_RibE -> RibE + Riboflavin; k2*D8RL_RibE;
  BindingR4: RibC + Riboflavin -> Riboflavin_RibC; k1*RibC*Riboflavin;
  DissociationR4: Riboflavin_RibC -> RibC + Riboflavin; k1r*Riboflavin_RibC;
  ConversionR4: Riboflavin_RibC -> RibC + FMN; k2*Riboflavin_RibC;
  BindingR5: RibC + FMN -> FMN_RibC; k1*RibC*FMN;
  DissociationR5: FMN_RibC -> RibC + FMN; k1r*FMN_RibC;
  ConversionR5: FMN_RibC -> RibC + FAD; k2*FMN_RibC;
  BindingR6: GTP + RibA -> GTP_RibA; k1*RibA*GTP;
  DissociationR6: GTP_RibA -> GTP + RibA; k1r*GTP_RibA;
  ConversionR6: GTP_RibA -> RibA + D6P4; k2*GTP_RibA;
  BindingR7: D6P4 + RibD -> RibD_D6P4; k1*RibD*D6P4;
  DissociationR7: RibD_D6P4 -> D6P4 + RibD; k1r*RibD_D6P4;
  ConversionR7: RibD_D6P4 -> RibD + A6U; k2*RibD_D6P4;
end
